// SBML level 3 version 2

model PBK_Cd()
  // model units - substance: MicroGM, volume: L, area: area, extent: MicroGM

  // Compartments:
  compartment default_compartment = 1 L;
  compartment Liver = 1 L; Liver is "liver";
  compartment Kidney = 1 L; Kidney is "kidney";
  compartment Others = 1 L;
  compartment Creatinine = 0.032 L;
  compartment Feces = 1 L; Feces is "feces";
  compartment Urine = 2 L; Urine is "urine";
  compartment Intestine = 1 L; Intestine is "intestine";
  compartment Gut = 1 L; Gut is "gut";
  compartment Lung = 1 L; Lung is "lung";
  compartment Expo = 1 L;
  compartment Excretion = 1 L; Excretion is "excreta";
  compartment Blood1 = 1 L;
  compartment Blood2 = 1 L;
  compartment Blood3 = 1 L;

  // Species:
  species QGut in Gut = 0; QGut is "Amount in gut";
  species QLiver in Liver = 0; QLiver is "Amount in liver";
  species QKidney in Kidney = 0; QKidney is "Amount in kidney";
  species QExpo in Expo = 0;
  species QLung in Lung = 0; QLung is "Amount in lungs";
  species QUrine in Urine = 0; QUrine is "Amount in urine";
  species QFeces in Feces = 0; QFeces is "Amount in feces";
  species QExcretion in Excretion = 0;
  species QIntestine in Intestine = 0; QIntestine is "Amount in intestine";
  species QBlood1 in Blood1 = 0; QBlood1 is "Amount in plasma";
  species QBlood2 in Blood2 = 0; QBlood2 is "Amount in red blood cells";
  species QBlood3 in Blood3 = 0; QBlood3 is "Amount in metallothionein";
  species QOthers in Others = 0;
  species CUrine in Creatinine = 0;
  species QAir_Cig in default_compartment = 0;
  species QAir_Dust in default_compartment = 0;
  species Parameters in default_compartment = 0;

  // Parameters:
  VCreat has g;
  QAir = 0;
  Sex = 1 UNITLESS; Sex is "sex";
  BW has kg; BW is "body weight";
  Age has YR; Age is "age";
  DeltaBW = 1;
  Age_init = 0 YR;
  CIngestion = 0.3;
  QtCig = 1; QtCig is "Quantity of Cd in 1 cigarette";
  Age_smoke_begin = 18;
  Age_smoke_end = 45;
  CAir = 0.01; CAir is "Concentration of Cd in ambient air";
  Vtidal_female = 0.0392;
  Vtidal = 0.0407 L; Vtidal is "Tidal volume";
  FqBreath = 38.9; FqBreath is "Respiratory frequency";
  Vds_female = 0.0107;
  Vds = 0.0101 L; Vds is "Physiological dead space";
  VInhalation = 1714.0896; VInhalation is "volume of air inhaled";
  nbCig = 1;
  C1_cig = 0.1;
  C1_dust = 0.7;
  C2_cig = 0.4;
  C2_dust = 0.13;
  C3 = 0.05 PER_DAY; C3 is "Rate of transfer of inhalation intake to uptake pool";
  C4 = 0.005 PER_DAY; C4 is "Rate of transfer of air Cd to the GI-tract";
  C5 = 0.048; C5 is "Fraction of GI-tract Cd retained in epithelium";
  C6 = 0.05 PER_DAY; C6 is "Rate of transfer of Cd in the GI-tract to uptake pool";
  C7 = 0.25; C7 is "Fraction of uptake pool transferred to blood";
  C8 = 1000 MicroGM; C8 is "Maximum mass of Cd in uptake pool";
  C9 = 0.44 PER_DAY; C9 is "Rate of transfer from plasma to other tissues";
  C10 = 0.00014 PER_DAY; C10 is "Rate of transfer of Cd in other tissues to plasma";
  C11 = 0.27 PER_DAY; C11 is "Rate of transfer of Cd in plasma to feces";
  C12 = 0.25 PER_DAY; C12 is "Rate of transfer of Cd in plasma to liver";
  C13 = 3e-5 PER_DAY; C13 is "Rate of transfer of Cd in liver to plasma";
  C14 = 0.00016 PER_DAY; C14 is "Rate of transfer of Cd in liver to metallothionein";
  C15 = 5e-5 PER_DAY; C15 is "Rate of transfer of Cd in liver to feces";
  C16 = 0.012 PER_DAY; C16 is "Rate of transfer of Cd in blood red blodd cells to metallothionein";
  C17 has PER_DAY; C17 is "Rate of transfer of Cd in metallothionein to kidney";
  C18 = 1e-5 PER_DAY; C18 is "Rate of transfer of Cd in kidney to plasma";
  C19 has PER_DAY; C19 is "Age-specific rate constant for transfer of Cd in kidney to urine";
  C21 = 1.1e-6; C21 is "Increased transfer of Cd from kidney to urine after age 30";
  C20 = 0.1 UNITLESS; C20 is "Fraction of Cd in plasma and red blood cells that contribute to cadmium in whole blood";
  CX = 0.04 PER_DAY; CX is "Rate of transfer of Cd in B1 to blood B2";

  // Assignment rules:
  VCreat := piecewise(0.032 + 0.02098*Age + 0.009104*Age^2 - 0.000455*Age^3 + 7.578e-6*Age^4 - 4.232e-8*Age^5, Age < 70, 0.032 + 0.02098*70 + 0.009104*70^2 - 0.000455*70^3 + 7.578e-6*70^4 - 4.232e-8*70^5);
  BW := piecewise((3.938425 + 0.7518199*Age*12 - 0.02023793*(Age*12)^2 + 0.0002921682*(Age*12)^3 - 2.06762e-6*(Age*12)^4 + 8.469e-9*(Age*12)^5 - 2.188427e-11*(Age*12)^6 + 3.699776e-14*(Age*12)^7 - 4.099077e-17*(Age*12)^8 + 2.874804e-20*(Age*12)^9 - 1.159732e-23*(Age*12)^10 + 2.052602e-27*(Age*12)^11)*DeltaBW, Sex > 0, (3.932403 + 0.6866462*Age*12 - 0.01949911*(Age*12)^2 + 0.00031311*(Age*12)^3 - 2.466654e-6*(Age*12)^4 + 1.113217e-8*(Age*12)^5 - 3.131402e-11*(Age*12)^6 + 5.693737e-14*(Age*12)^7 - 6.706947e-17*(Age*12)^8 + 4.947858e-20*(Age*12)^9 - 2.079251e-23*(Age*12)^10 + 3.800367e-27*(Age*12)^11)*DeltaBW);
  Age := Age_init + time/365;
  ExpoCig := piecewise(1, (Age >= Age_smoke_begin) && (Age <= Age_smoke_end), 0);
  Vtidal_male := piecewise(0.0337*Age + 0.0407, 0.0337*Age + 0.0407 < 0.75, 0.75);
  Vds_male := piecewise(0.0076*Age + 0.0101, 0.0076*Age + 0.0101 < 0.15, 0.15);
  I2 := piecewise(C7*QExpo, C7*QExpo < C8, C8);
  C17 := piecewise(0.95, Age < 30, 0.95 - 0.95/3*(Age - 30)/50);
  C19 := piecewise(0.00014, Age < 30, 0.00014 + C21*(Age - 30));

  // Reactions:
  T1: -> QGut; CIngestion*BW;
  T2: -> QAir_Cig; ExpoCig*nbCig;
  T3: -> QAir_Dust; CAir*VInhalation;
  T4: QAir_Cig -> QLung; QAir_Cig*C2_cig;
  T5: QAir_Dust -> QLung; QAir_Dust*C2_dust;
  T6: QAir_Cig -> QIntestine; QAir_Cig*C1_cig*C5;
  T7: QAir_Dust -> QIntestine; QAir_Dust*C1_dust*C5;
  T8: QGut -> QIntestine; (QGut + QLung*C4)*C5;  // modifiers: QLung
  T9: QLung -> QExpo; QLung*C3;
  T10: QIntestine -> QExpo; QIntestine*C6;
  T11: QExpo -> QBlood3; I2;
  T12: QExpo -> QBlood1; QExpo - I2;
  T13: QBlood1 -> QOthers; QBlood1*C9;
  T14: QBlood1 -> QBlood2; QBlood1*CX;
  T15: QOthers -> QBlood1; QOthers*C10;
  T16: QBlood1 -> QFeces; QBlood1*C11;
  T17: QBlood1 -> QLiver; QBlood1*C12;
  T18: QLiver -> QBlood1; QLiver*C13;
  T19: QLiver -> QBlood3; QLiver*C14;
  T20: QLiver -> QFeces; QLiver*C15;
  T21: QBlood2 -> QBlood3; QBlood2*C16;
  T22: QBlood3 -> QKidney; QBlood3*C17;
  T23: QKidney -> QBlood1; QKidney*C18;
  T24: QKidney -> QUrine; QKidney*C19;
  T25: QBlood3 -> QUrine; QBlood3*(1 - C17);
  T26: QFeces -> QExcretion; QFeces;
  T27: QUrine -> QExcretion; QUrine;
  R1: -> CUrine; QUrine/VCreat - CUrine;  // modifiers: QUrine
  P1: -> Parameters; Age_smoke_begin + Age_smoke_end + CAir + nbCig;

  // Unit definitions:
  unit day = 86400 second;
  unit substance = 1e-6 gram;
  unit microg_kg = 1e-6 gram / (1000 gram);
  unit volume = litre;
  unit kg = 1000 gram;
  unit g = gram;
  unit area = 1;
  unit m = 1;
  unit MicroGM = 1e-6 gram;
  unit L = litre;
  unit UNITLESS = dimensionless;
  unit YR = 3.15576e7 second;
  unit PER_DAY = 1 / (86400 second);
end
